# OpenSim document version 40000
InverseKinematicsTool:
  time_range: 0 25.52917
  marker_file: TRCs_w_HJCs/S1003_DLSQUATS_markers_w_HJCs.trc
  IKTaskSet:
    IKMarkerTask RASI: apply=true weight=25
    IKMarkerTask LASI: apply=true weight=25
    IKMarkerTask RPSI: apply=true weight=25
    IKMarkerTask LPSI: apply=true weight=25
    IKMarkerTask RKNE: apply=true weight=30
    IKMarkerTask RMKN: apply=false weight=1
    IKMarkerTask RANK: apply=true weight=30
    IKMarkerTask RMED: apply=false weight=1
    IKMarkerTask RTOE: apply=true weight=30
    IKMarkerTask RHEE: apply=true weight=60
    IKMarkerTask LKNE: apply=true weight=30
    IKMarkerTask LMKN: apply=false weight=1
    IKMarkerTask LANK: apply=true weight=30
    IKMarkerTask LMED: apply=false weight=1
    IKMarkerTask LTOE: apply=true weight=30
    IKMarkerTask LHEE: apply=true weight=60
    IKMarkerTask RSHO: apply=true weight=5
    IKMarkerTask LSHO: apply=true weight=5
    IKMarkerTask C7: apply=true weight=5
    IKMarkerTask RELB: apply=true weight=5
    IKMarkerTask RWRA: apply=true weight=5
    IKMarkerTask RWRB: apply=true weight=5
    IKMarkerTask LELB: apply=true weight=5
    IKMarkerTask LWRA: apply=true weight=5
    IKMarkerTask LWRB: apply=true weight=5
    IKMarkerTask RTHI: apply=true weight=4
    IKMarkerTask LTHI: apply=true weight=4
    IKMarkerTask RTIB: apply=true weight=4
    IKMarkerTask LTIB: apply=true weight=4
    IKMarkerTask CLAV: apply=false weight=4
    IKMarkerTask RUPA: apply=true weight=4
    IKMarkerTask LUPA: apply=true weight=4
    IKMarkerTask RFRM: apply=true weight=4
    IKMarkerTask LFRM: apply=true weight=4
    IKMarkerTask RHJC: apply=true weight=25
    IKMarkerTask LHJC: apply=true weight=25
